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/BATCH
/COM,ANSYS RELEASE Release 16.2      BUILD 16.2      UP20150629       21:16:47
/input,menust,tmp,''
/GST,ON
/PLO,INFO,3
/GRO,CURL,ON
/CPLANE,1
WPSTYLE,,,,,,,,0
c
/COM,ANSYS RELEASE Release 16.2      BUILD 16.2      UP20150629       21:17:10
resume,6_08,db,,0
/COM,ANSYS RELEASE Release 16.2      BUILD 16.2      UP20150629       21:17:11
/POST1
/EFACET,1
PLNSOL, EPPL,X, 0,1.0
/EFACET,1
PLNSOL, U,X, 0,1.0
/EFACET,1
PLNSOL, TOPO,, 0,1.0
/EFACET,1
PLNSOL, NL,PSV, 0,1.0
/EFACET,1
PLNSOL, NL,PLWK, 0,1.0
/EFACET,1
PLNSOL, NL,PSV, 0,1.0
PLESOL, SENE,, 0,1.0
c
/COM,ANSYS RELEASE Release 16.2      BUILD 16.2      UP20150629       21:22:24
resume,6_08,db,,0
/COM,ANSYS RELEASE Release 16.2      BUILD 16.2      UP20150629       21:22:24
show
/POST1
c
/COM,ANSYS RELEASE Release 16.2      BUILD 16.2      UP20150629       21:22:47
resume,6_08,db,,0
/COM,ANSYS RELEASE Release 16.2      BUILD 16.2      UP20150629       21:22:48
csys,101
nsel,u,loc,s,0,t
ESLN,U,1
nsel,u,loc,x,0,t
ESLN,U,1
EPLOT
NPLOT
EPLOT
/POST1
/EFACET,1
PLNSOL, U,SUM, 0,1.0
c
/COM,ANSYS RELEASE Release 16.2      BUILD 16.2      UP20150629       21:24:40
resume,6_08,db,,0
/COM,ANSYS RELEASE Release 16.2      BUILD 16.2      UP20150629       21:24:41
csys,101
nsel,s,loc,x,0,t
ESLN,U,1
csys,101
nsel,s,loc,x,t*1.5,100*t
ESLN,U,1
esel,all
csys,101
nsel,s,loc,x,t*1.5,100*t
ESLN,U,1
/POST1
PLESOL, SENE,, 0,1.0
EPLOT
PLESOL, SENE,, 0,1.0
c
/COM,ANSYS RELEASE Release 16.2      BUILD 16.2      UP20150629       21:27:24
c
/COM,ANSYS RELEASE Release 16.2      BUILD 16.2      UP20150629       21:27:30
resume,6_08,db,,0
/COM,ANSYS RELEASE Release 16.2      BUILD 16.2      UP20150629       21:27:31
show
show
esel,all
esel,all
c
/COM,ANSYS RELEASE Release 16.2      BUILD 16.2      UP20150629       21:28:48
resume,6_08,db,,0
/COM,ANSYS RELEASE Release 16.2      BUILD 16.2      UP20150629       21:28:48
show
c
/COM,ANSYS RELEASE Release 16.2      BUILD 16.2      UP20150629       21:29:08
resume,6_08,db,,0
/COM,ANSYS RELEASE Release 16.2      BUILD 16.2      UP20150629       21:29:08
csys,101
nsel,s,loc,x,0,t
ESLN,U,1
c
/COM,ANSYS RELEASE Release 16.2      BUILD 16.2      UP20150629       21:29:41
resume,6_08,db,,0
/COM,ANSYS RELEASE Release 16.2      BUILD 16.2      UP20150629       21:29:42
csys,101
nsel,s,loc,x,t,H
ESLN,U,1
nsel,all
esel,all
csys,101
nsel,s,loc,x,t,2*H
ESLN,U,1
/POST1
PLESOL, SENE,, 0,1.0
c
/COM,ANSYS RELEASE Release 16.2      BUILD 16.2      UP20150629       21:31:04
resume,6_08,db,,0
/COM,ANSYS RELEASE Release 16.2      BUILD 16.2      UP20150629       21:31:05
show
EPLOT
c
/COM,ANSYS RELEASE Release 16.2      BUILD 16.2      UP20150629       21:32:22
resume,6_08,db,,0
/COM,ANSYS RELEASE Release 16.2      BUILD 16.2      UP20150629       21:32:22
show
show
EPLOT
esel,all
csys,101
nsel,s,loc,x,t,2*t
ESLN,U,1
nsel,s,loc,x,t,3*t
ESLN,U,1
PLESOL, SENE,, 0,1.0
esel,sall
esel,all
EPLOT
PLESOL, SENE,, 0,1.0
c
/COM,ANSYS RELEASE Release 16.2      BUILD 16.2      UP20150629       21:34:44
resume,6_08,db,,0\
/COM,ANSYS RELEASE Release 16.2      BUILD 16.2      UP20150629       21:34:47
c
/COM,ANSYS RELEASE Release 16.2      BUILD 16.2      UP20150629       21:34:57
resume,6_08,db,,0
/COM,ANSYS RELEASE Release 16.2      BUILD 16.2      UP20150629       21:34:57
/POST1
PLESOL, SENE,, 0,1.0
csys,101
nsel,s,loc,x,t,2*H
ESLN,U,1
c
/COM,ANSYS RELEASE Release 16.2      BUILD 16.2      UP20150629       21:36:29
resume,6_08,db,,0
/COM,ANSYS RELEASE Release 16.2      BUILD 16.2      UP20150629       21:36:29
finish
/post1
! Создание области точек для расчета
rad
RSYS,101
*SET,tchk,110                       ! Количество точек пути (11 точек в 10 кругах)
*SET,omnom,0                        ! Номер точки пути
*SET,pi,aCOS(-1)
*SET,Robl,Rvnutr-(Rvnesh-Rvnutr)/9
PATH,step,tchk,10,1,
! Создание геометрии пути в одной плоскости
! Возможно ТОЛЬКО В ГЛОБАЛЬНОЙ ДЕКАРТОВОЙ СК
*do,i,1,10
*SET,Robl,Robl+(Rvnesh-Rvnutr)/9
*SET,alfa,-pi/10
*SET,zz,t/2    ! Имеется ввиду плоскость
*do,j,1,11
*SET,omnom,omnom+1
*SET,alfa,alfa+pi/10
PPATH,omnom,0,lic+Robl*cos(alfa),Robl*sin(alfa),zz,100,
*enddo
*enddo
/PBC,PATH,1
/PBC,PATH,0
/PBC,PATH,1
/PBC,PATH,0
!
PDEF,STAT
/PBC,PATH,1
/PBC,PATH,0
PLESOL, KENE,, 0,1.0
PLESOL, SENE,, 0,1.0
nsel,s,loc,x,t,2*H
ESLN,U,1
esel,all
nsel,all
csys,101
csys,101
nsel,s,loc,x,t,2*H
ESLN,U,1
nsel,all
asel,all
c
/COM,ANSYS RELEASE Release 16.2      BUILD 16.2      UP20150629       21:59:57
resume,6_08,db,,0
/COM,ANSYS RELEASE Release 16.2      BUILD 16.2      UP20150629       21:59:57
show
c
/COM,ANSYS RELEASE Release 16.2      BUILD 16.2      UP20150629       22:00:52
c
/COM,ANSYS RELEASE Release 16.2      BUILD 16.2      UP20150629       22:01:00
resume,6_14,db,,0
/COM,ANSYS RELEASE Release 16.2      BUILD 16.2      UP20150629       22:01:01
show
show
esel,all
show
esel,all
c
/COM,ANSYS RELEASE Release 16.2      BUILD 16.2      UP20150629       22:08:02
resume,6_08,db,,0
/COM,ANSYS RELEASE Release 16.2      BUILD 16.2      UP20150629       22:08:02
show
PLESOL, SENE,, 0,1.0
c
/COM,ANSYS RELEASE Release 16.2      BUILD 16.2      UP20150629       00:45:56
dcb_c
dcb_c
c
/COM,ANSYS RELEASE Release 16.2      BUILD 16.2      UP20150629       00:57:26
dcb_c
c
/COM,ANSYS RELEASE Release 16.2      BUILD 16.2      UP20150629       00:58:36
*SET,pi,aCOS(-1)
*SET,b,150
*DIM,sukaa,,19
*vread,sukaa(1,1),'C:\Users\Steplerchik\Desktop\НИРс\Параметрический ДКБ образец ANSYS\Data-out\Betta_0.4',txt,,IJK,19,1,,1
! (F20.0)
c
/COM,ANSYS RELEASE Release 16.2      BUILD 16.2      UP20150629       00:58:54
dcb_c
/COM,ANSYS RELEASE Release 16.2      BUILD 16.2      UP20150629       01:01:59
c
/COM,ANSYS RELEASE Release 16.2      BUILD 16.2      UP20150629       01:02:18
c
/COM,ANSYS RELEASE Release 16.2      BUILD 16.2      UP20150629       01:02:22
dcb_c
/COM,ANSYS RELEASE Release 16.2      BUILD 16.2      UP20150629       01:02:27
c
/COM,ANSYS RELEASE Release 16.2      BUILD 16.2      UP20150629       01:02:38
dcb_c
/COM,ANSYS RELEASE Release 16.2      BUILD 16.2      UP20150629       01:02:55
dcb_c
/COM,ANSYS RELEASE Release 16.2      BUILD 16.2      UP20150629       01:03:08
dcb_c
/COM,ANSYS RELEASE Release 16.2      BUILD 16.2      UP20150629       01:03:19
dcb_c
/COM,ANSYS RELEASE Release 16.2      BUILD 16.2      UP20150629       01:05:30
c
/COM,ANSYS RELEASE Release 16.2      BUILD 16.2      UP20150629       01:05:34
c_jpg
FINISH
! /EXIT,NOSAV
/BATCH
/COM,ANSYS RELEASE Release 16.2      BUILD 16.2      UP20150629       02:19:18
/input,menust,tmp,''
/GST,ON
/PLO,INFO,3
/GRO,CURL,ON
/CPLANE,1
WPSTYLE,,,,,,,,0
c
/COM,ANSYS RELEASE Release 16.2      BUILD 16.2      UP20150629       02:19:32
dcb_20
/COM,ANSYS RELEASE Release 16.2      BUILD 16.2      UP20150629       10:01:12
FINISH
! /EXIT,NOSAV
/BATCH
/COM,ANSYS RELEASE Release 16.2      BUILD 16.2      UP20150629       11:31:00
/input,menust,tmp,''
/GST,ON
/PLO,INFO,3
/GRO,CURL,ON
/CPLANE,1
WPSTYLE,,,,,,,,0
c
/COM,ANSYS RELEASE Release 16.2      BUILD 16.2      UP20150629       11:32:50
dcb_c
/COM,ANSYS RELEASE Release 16.2      BUILD 16.2      UP20150629       11:34:44
c_jpg
c
/COM,ANSYS RELEASE Release 16.2      BUILD 16.2      UP20150629       17:57:52
FINISH
! /EXIT,NOSAV
/BATCH
/COM,ANSYS RELEASE Release 16.2      BUILD 16.2      UP20150629       18:19:20
/input,menust,tmp,''
/GST,ON
/PLO,INFO,3
/GRO,CURL,ON
/CPLANE,1
WPSTYLE,,,,,,,,0
dcb_c_matl
/COM,ANSYS RELEASE Release 16.2      BUILD 16.2      UP20150629       18:31:01
c
/COM,ANSYS RELEASE Release 16.2      BUILD 16.2      UP20150629       18:31:04
dcb
/COM,ANSYS RELEASE Release 16.2      BUILD 16.2      UP20150629       09:49:35
dcb_c
/COM,ANSYS RELEASE Release 16.2      BUILD 16.2      UP20150629       09:50:05
c
/COM,ANSYS RELEASE Release 16.2      BUILD 16.2      UP20150629       09:50:08
dcb_c
/COM,ANSYS RELEASE Release 16.2      BUILD 16.2      UP20150629       09:51:40
c
/COM,ANSYS RELEASE Release 16.2      BUILD 16.2      UP20150629       09:51:45
c_jpg
c
/COM,ANSYS RELEASE Release 16.2      BUILD 16.2      UP20150629       09:52:54
c_jpg
c
/COM,ANSYS RELEASE Release 16.2      BUILD 16.2      UP20150629       09:56:27
*SET,aw,1
*SET,b,150
*SET,t,10
*SET,l,aw*0.05*b
*SET,E,3000
*SET,mu,0.3
*SET,H,0.4*b
model_dcb,b,t,l,E,mu,H
finish
/post1
! Создание области точек для расчета
rad
RSYS,101
*SET,tchk,110                       ! Количество точек пути (11 точек в 10 кругах)
*SET,omnom,0                        ! Номер точки пути
*SET,pi,aCOS(-1)
*SET,Robl,Rvnutr-(Rvnesh-Rvnutr)/9
PATH,step,tchk,10,1,
! Создание геометрии пути в одной плоскости
! Возможно ТОЛЬКО В ГЛОБАЛЬНОЙ ДЕКАРТОВОЙ СК
*do,i,1,10
*SET,Robl,Robl+(Rvnesh-Rvnutr)/9
*SET,alfa,-pi/10
*SET,zz,0    ! Имеется ввиду плоскость
*do,j,1,11
*SET,omnom,omnom+1
*SET,alfa,alfa+pi/10
PPATH,omnom,0,lic+Robl*cos(alfa),Robl*sin(alfa),zz,100,
*enddo
*enddo
/PBC,PATH,1
/PBC,PATH,0
/PBC,PATH,1
/PBC,PATH,0
/PBC,PATH,1
/PBC,PATH,0
/PBC,PATH,1
/PBC,PATH,0
c
/COM,ANSYS RELEASE Release 16.2      BUILD 16.2      UP20150629       09:58:10
c
/COM,ANSYS RELEASE Release 16.2      BUILD 16.2      UP20150629       09:58:12
dcb
/COM,ANSYS RELEASE Release 16.2      BUILD 16.2      UP20150629       22:20:19
c
/COM,ANSYS RELEASE Release 16.2      BUILD 16.2      UP20150629       22:20:26
dcb_c
/COM,ANSYS RELEASE Release 16.2      BUILD 16.2      UP20150629       22:20:38
dcb_c
/COM,ANSYS RELEASE Release 16.2      BUILD 16.2      UP20150629       22:20:49
dcb_c
/COM,ANSYS RELEASE Release 16.2      BUILD 16.2      UP20150629       22:21:03
dcb_c
/COM,ANSYS RELEASE Release 16.2      BUILD 16.2      UP20150629       22:21:11
dcb_c
/COM,ANSYS RELEASE Release 16.2      BUILD 16.2      UP20150629       22:21:20
dcb_c
/COM,ANSYS RELEASE Release 16.2      BUILD 16.2      UP20150629       22:21:30
dcb_c
/COM,ANSYS RELEASE Release 16.2      BUILD 16.2      UP20150629       22:21:39
dcb_c
/COM,ANSYS RELEASE Release 16.2      BUILD 16.2      UP20150629       22:21:53
dcb_c
/COM,ANSYS RELEASE Release 16.2      BUILD 16.2      UP20150629       22:22:26
c_jpg
c
/COM,ANSYS RELEASE Release 16.2      BUILD 16.2      UP20150629       22:23:05
c_jpg
c
/COM,ANSYS RELEASE Release 16.2      BUILD 16.2      UP20150629       22:24:08
c_jpg
c
/COM,ANSYS RELEASE Release 16.2      BUILD 16.2      UP20150629       22:27:39
dcb_c_matl
/COM,ANSYS RELEASE Release 16.2      BUILD 16.2      UP20150629       22:34:34
dcb_c_matl
FINISH
! /EXIT,NOSAV
/BATCH
/COM,ANSYS RELEASE Release 16.2      BUILD 16.2      UP20150629       16:03:17
/input,menust,tmp,''
/GST,ON
/PLO,INFO,3
/GRO,CURL,ON
/CPLANE,1
WPSTYLE,,,,,,,,0
c
/COM,ANSYS RELEASE Release 16.2      BUILD 16.2      UP20150629       16:03:43
*SET,aw,1
*SET,b,150
*SET,t,10
*SET,l,aw*0.05*b
*SET,E,3000
*SET,mu,0.3
*SET,H,0.4*b
model_dcb,b,t,l,E,mu,H
raschet
c
/COM,ANSYS RELEASE Release 16.2      BUILD 16.2      UP20150629       16:07:27
*SET,aw,2
*SET,b,150
*SET,t,10
*SET,l,aw*0.05*b
*SET,E,3000
*SET,mu,0.3
*SET,H,0.4*b
model_dcb,b,t,l,E,mu,H
raschet
c
/COM,ANSYS RELEASE Release 16.2      BUILD 16.2      UP20150629       16:12:40
dcb_
c
/COM,ANSYS RELEASE Release 16.2      BUILD 16.2      UP20150629       16:15:09
dcb_
c
/COM,ANSYS RELEASE Release 16.2      BUILD 16.2      UP20150629       16:16:08
dcb_
c
/COM,ANSYS RELEASE Release 16.2      BUILD 16.2      UP20150629       16:18:18
dcb_
c
/COM,ANSYS RELEASE Release 16.2      BUILD 16.2      UP20150629       16:19:19
dcb_
/COM,ANSYS RELEASE Release 16.2      BUILD 16.2      UP20150629       16:20:33
c
/COM,ANSYS RELEASE Release 16.2      BUILD 16.2      UP20150629       16:20:37
dcb_
c
/COM,ANSYS RELEASE Release 16.2      BUILD 16.2      UP20150629       16:23:24
dcb_
c
/COM,ANSYS RELEASE Release 16.2      BUILD 16.2      UP20150629       16:30:40
dcb_
c
/COM,ANSYS RELEASE Release 16.2      BUILD 16.2      UP20150629       16:48:08
dcb_
/COM,ANSYS RELEASE Release 16.2      BUILD 16.2      UP20150629       16:49:34
c
/COM,ANSYS RELEASE Release 16.2      BUILD 16.2      UP20150629       16:49:36
*SET,aw,1
*SET,b,150
*SET,t,10
*SET,l,aw*0.05*b
*SET,E,3000
*SET,mu,0.3
*SET,H,0.4*b
model_dcb,b,t,l,E,mu,H
raschet
c
/COM,ANSYS RELEASE Release 16.2      BUILD 16.2      UP20150629       16:57:26
c
/COM,ANSYS RELEASE Release 16.2      BUILD 16.2      UP20150629       16:57:28
*SET,aw,1
*SET,b,150
*SET,t,10
*SET,l,aw*0.05*b
*SET,E,3000
*SET,mu,0.3
*SET,H,0.4*b
model_dcb,b,t,l,E,mu,H
raschet
c
/COM,ANSYS RELEASE Release 16.2      BUILD 16.2      UP20150629       16:59:20
*SET,aw,1
*SET,b,150
*SET,t,10
*SET,l,aw*0.05*b
*SET,E,3000
*SET,mu,0.3
*SET,H,0.4*b
model_dcb,b,t,l,E,mu,H
raschet
c
/COM,ANSYS RELEASE Release 16.2      BUILD 16.2      UP20150629       17:04:46
c
/COM,ANSYS RELEASE Release 16.2      BUILD 16.2      UP20150629       17:04:52
*SET,aw,1
*SET,b,150
*SET,t,10
*SET,l,aw*0.05*b
*SET,E,3000
*SET,mu,0.3
*SET,H,0.4*b
model_dcb,b,t,l,E,mu,H
raschet
c
/COM,ANSYS RELEASE Release 16.2      BUILD 16.2      UP20150629       17:10:41
*SET,aw,1
*SET,b,150
*SET,t,10
*SET,l,aw*0.05*b
*SET,E,3000
*SET,mu,0.3
*SET,H,0.4*b
model_dcb,b,t,l,E,mu,H
raschet
c
/COM,ANSYS RELEASE Release 16.2      BUILD 16.2      UP20150629       17:14:23
*SET,aw,1
*SET,b,150
*SET,t,10
*SET,l,aw*0.05*b
*SET,E,3000
*SET,mu,0.3
*SET,H,0.4*b
model_dcb,b,t,l,E,mu,H
raschet
c
/COM,ANSYS RELEASE Release 16.2      BUILD 16.2      UP20150629       17:30:26
dcb_
/COM,ANSYS RELEASE Release 16.2      BUILD 16.2      UP20150629       17:30:59
c
/COM,ANSYS RELEASE Release 16.2      BUILD 16.2      UP20150629       17:32:08
dcb_
/COM,ANSYS RELEASE Release 16.2      BUILD 16.2      UP20150629       17:32:32
c
/COM,ANSYS RELEASE Release 16.2      BUILD 16.2      UP20150629       17:43:07
dcb_04
/COM,ANSYS RELEASE Release 16.2      BUILD 16.2      UP20150629       17:53:20
c
/COM,ANSYS RELEASE Release 16.2      BUILD 16.2      UP20150629       17:53:22
dcb_04
/COM,ANSYS RELEASE Release 16.2      BUILD 16.2      UP20150629       18:57:54
c
/COM,ANSYS RELEASE Release 16.2      BUILD 16.2      UP20150629       18:57:56
dcb_
/COM,ANSYS RELEASE Release 16.2      BUILD 16.2      UP20150629       19:09:45
FINISH
! /EXIT,NOSAV
/BATCH
/COM,ANSYS RELEASE Release 16.2      BUILD 16.2      UP20150629       23:01:51
/input,menust,tmp,''
/GST,ON
/PLO,INFO,3
/GRO,CURL,ON
/CPLANE,1
WPSTYLE,,,,,,,,0
FINISH
! /EXIT,NOSAV
/BATCH
/COM,ANSYS RELEASE Release 16.2      BUILD 16.2      UP20150629       02:51:21
/input,menust,tmp,''
/GST,ON
/PLO,INFO,3
/GRO,CURL,ON
/CPLANE,1
WPSTYLE,,,,,,,,0
! �
c
/COM,ANSYS RELEASE Release 16.2      BUILD 16.2      UP20150629       02:52:12
dcb_
/COM,ANSYS RELEASE Release 16.2      BUILD 16.2      UP20150629       02:52:59
c
/COM,ANSYS RELEASE Release 16.2      BUILD 16.2      UP20150629       02:53:01
*SET,aw,12
*SET,b,150
*SET,t,10
*SET,l,aw*0.05*b
*SET,E,3000
*SET,mu,0.3
*SET,H,0.4*b
model_dcb,b,t,l,E,mu,H
raschet
/EFACET,1
PLNSOL, S,X, 0,1.0
/post1
csys,101
nsel,s,loc,x,2*t,2*H
ESLN,U,1
nsel,all
/EFACET,1
PLNSOL, S,X, 0,1.0
/EFACET,1
PLNSOL, S,Y, 0,1.0
c
/COM,ANSYS RELEASE Release 16.2      BUILD 16.2      UP20150629       02:56:07
FINISH
! /EXIT,NOSAV
/BATCH
/COM,ANSYS RELEASE Release 16.2      BUILD 16.2      UP20150629       22:30:14
/input,menust,tmp,''
/GST,ON
/PLO,INFO,3
/GRO,CURL,ON
/CPLANE,1
WPSTYLE,,,,,,,,0
c
/COM,ANSYS RELEASE Release 16.2      BUILD 16.2      UP20150629       22:40:15
c
/COM,ANSYS RELEASE Release 16.2      BUILD 16.2      UP20150629       22:40:18
dcb_04
/COM,ANSYS RELEASE Release 16.2      BUILD 16.2      UP20150629       22:51:01
FINISH
! /EXIT,NOSAV
/BATCH
/COM,ANSYS RELEASE Release 16.2      BUILD 16.2      UP20150629       22:52:08
/input,menust,tmp,''
/GST,ON
/PLO,INFO,3
/GRO,CURL,ON
/CPLANE,1
WPSTYLE,,,,,,,,0
c
/COM,ANSYS RELEASE Release 16.2      BUILD 16.2      UP20150629       22:54:01
dcb_c
/COM,ANSYS RELEASE Release 16.2      BUILD 16.2      UP20150629       22:54:24
*DIM,sukaa,,19
*vread,sukaa(1,1),'C:\Users\Steplerchik\Desktop\НИРс\Параметрический ДКБ образец ANSYS\Data-out\C_0.4',txt,,IJK,19,1,,1
! (F20.0)
*CFOPEN,'C:\Users\Steplerchik\Desktop\НИРс\Параметрический ДКБ образец ANSYS\Data-out\C_0.4_matl',txt,,
*VWRITE,sukaa(1,1)
! %G
*CFCLOS
c
/COM,ANSYS RELEASE Release 16.2      BUILD 16.2      UP20150629       22:55:27
c
/COM,ANSYS RELEASE Release 16.2      BUILD 16.2      UP20150629       22:55:33
dcb_c_matl_
c
/COM,ANSYS RELEASE Release 16.2      BUILD 16.2      UP20150629       22:57:15
! dcb_k2_matl
c
/COM,ANSYS RELEASE Release 16.2      BUILD 16.2      UP20150629       22:57:27
dcb_k2_matl_
FINISH
! /EXIT,NOSAV
/BATCH
/COM,ANSYS RELEASE Release 16.2      BUILD 16.2      UP20150629       01:42:53
/input,menust,tmp,''
/GST,ON
/PLO,INFO,3
/GRO,CURL,ON
/CPLANE,1
WPSTYLE,,,,,,,,0
c
/COM,ANSYS RELEASE Release 16.2      BUILD 16.2      UP20150629       01:47:04
dcb
/COM,ANSYS RELEASE Release 16.2      BUILD 16.2      UP20150629       00:55:48
dcb_c
/COM,ANSYS RELEASE Release 16.2      BUILD 16.2      UP20150629       00:56:08
dcb_c
/COM,ANSYS RELEASE Release 16.2      BUILD 16.2      UP20150629       00:56:17
c
/COM,ANSYS RELEASE Release 16.2      BUILD 16.2      UP20150629       00:56:20
c
/COM,ANSYS RELEASE Release 16.2      BUILD 16.2      UP20150629       00:56:35
dcb_c
/COM,ANSYS RELEASE Release 16.2      BUILD 16.2      UP20150629       00:56:46
dcb_c
/COM,ANSYS RELEASE Release 16.2      BUILD 16.2      UP20150629       00:56:55
dcb_c
/COM,ANSYS RELEASE Release 16.2      BUILD 16.2      UP20150629       00:57:08
dcb_c
/COM,ANSYS RELEASE Release 16.2      BUILD 16.2      UP20150629       00:57:20
dcb_c
/COM,ANSYS RELEASE Release 16.2      BUILD 16.2      UP20150629       00:57:28
dcb_c
/COM,ANSYS RELEASE Release 16.2      BUILD 16.2      UP20150629       00:57:36
dcb_c
/COM,ANSYS RELEASE Release 16.2      BUILD 16.2      UP20150629       00:57:46
dcb_c
/COM,ANSYS RELEASE Release 16.2      BUILD 16.2      UP20150629       00:57:57
dcb_c
/COM,ANSYS RELEASE Release 16.2      BUILD 16.2      UP20150629       00:58:36
dcb_c_matl
dcb_k2_matl
FINISH
! /EXIT,NOSAV
/BATCH
/COM,ANSYS RELEASE Release 16.2      BUILD 16.2      UP20150629       12:24:01
/input,menust,tmp,''
/GST,ON
/PLO,INFO,3
/GRO,CURL,ON
/CPLANE,1
WPSTYLE,,,,,,,,0
c
/COM,ANSYS RELEASE Release 16.2      BUILD 16.2      UP20150629       12:24:09
*SET,aw,12
*SET,b,150
*SET,t,10
*SET,l,aw*0.05*b
*SET,E,3000
*SET,mu,0.3
*SET,H,0.4*b
model_dcb,b,t,l,E,mu,H
raschet
*SET,pam(aw,1),betta
*SET,pam2(aw,1),K2_K1
*do,j,1,19
*SET,pam(1,j),pam(j,1)
*SET,pam2(1,j),pam2(j,1)
*enddo
FINISH
! /EXIT,NOSAV
/BATCH
/COM,ANSYS RELEASE Release 16.2      BUILD 16.2      UP20150629       14:12:36
/input,menust,tmp,''
/GST,ON
/PLO,INFO,3
/GRO,CURL,ON
/CPLANE,1
WPSTYLE,,,,,,,,0
c
/COM,ANSYS RELEASE Release 16.2      BUILD 16.2      UP20150629       14:13:07
dcb
/COM,ANSYS RELEASE Release 16.2      BUILD 16.2      UP20150629       14:14:02
! /EXIT,NOSAV
/BATCH
/COM,ANSYS RELEASE Release 16.2      BUILD 16.2      UP20150629       14:14:39
/input,menust,tmp,''
/GST,ON
/PLO,INFO,3
/GRO,CURL,ON
/CPLANE,1
WPSTYLE,,,,,,,,0
c
/COM,ANSYS RELEASE Release 16.2      BUILD 16.2      UP20150629       14:14:46
dcb
/COM,ANSYS RELEASE Release 16.2      BUILD 16.2      UP20150629       06:35:26
c
/COM,ANSYS RELEASE Release 16.2      BUILD 16.2      UP20150629       06:35:28
c
/COM,ANSYS RELEASE Release 16.2      BUILD 16.2      UP20150629       06:35:31
dcb_c
/COM,ANSYS RELEASE Release 16.2      BUILD 16.2      UP20150629       06:35:52
dcb_c
/COM,ANSYS RELEASE Release 16.2      BUILD 16.2      UP20150629       06:36:04
dcb_c
/COM,ANSYS RELEASE Release 16.2      BUILD 16.2      UP20150629       06:36:17
dcb_c
/COM,ANSYS RELEASE Release 16.2      BUILD 16.2      UP20150629       06:36:25
dcb_c
/COM,ANSYS RELEASE Release 16.2      BUILD 16.2      UP20150629       06:36:34
dcb_c
/COM,ANSYS RELEASE Release 16.2      BUILD 16.2      UP20150629       06:36:44
dcb_c
/COM,ANSYS RELEASE Release 16.2      BUILD 16.2      UP20150629       06:36:55
dcb_c
/COM,ANSYS RELEASE Release 16.2      BUILD 16.2      UP20150629       06:37:09
dcb_c
/COM,ANSYS RELEASE Release 16.2      BUILD 16.2      UP20150629       06:37:38
c
/COM,ANSYS RELEASE Release 16.2      BUILD 16.2      UP20150629       06:37:43
dcb_c_matl
dcb_k2_matl
FINISH
! /EXIT,NOSAV
/BATCH
/COM,ANSYS RELEASE Release 16.2      BUILD 16.2      UP20150629       01:49:40
/input,menust,tmp,''
/GST,ON
/PLO,INFO,3
/GRO,CURL,ON
/CPLANE,1
WPSTYLE,,,,,,,,0
c
/COM,ANSYS RELEASE Release 16.2      BUILD 16.2      UP20150629       01:50:35
dcb_04
/COM,ANSYS RELEASE Release 16.2      BUILD 16.2      UP20150629       01:58:06
c
/COM,ANSYS RELEASE Release 16.2      BUILD 16.2      UP20150629       01:58:10
dcb_c
/COM,ANSYS RELEASE Release 16.2      BUILD 16.2      UP20150629       01:58:21
c
/COM,ANSYS RELEASE Release 16.2      BUILD 16.2      UP20150629       01:58:26
dcb_c_matl_
c
/COM,ANSYS RELEASE Release 16.2      BUILD 16.2      UP20150629       01:58:58
dcb_k2_matl_
FINISH
! /EXIT,NOSAV
/BATCH
/COM,ANSYS RELEASE Release 16.2      BUILD 16.2      UP20150629       01:15:22
/input,menust,tmp,''
/GST,ON
/PLO,INFO,3
/GRO,CURL,ON
/CPLANE,1
WPSTYLE,,,,,,,,0
c
/COM,ANSYS RELEASE Release 16.2      BUILD 16.2      UP20150629       01:15:47
dcb_energy
/post1
csys,101
nsel,s,loc,x,2*t,2*H
ESLN,U,1
nsel,all
/post1
csys,101
nsel,s,loc,x,2*t,2*b
ESLN,U,1
nsel,all
c
/COM,ANSYS RELEASE Release 16.2      BUILD 16.2      UP20150629       01:17:50
dcb_energy
show_energy
c
/COM,ANSYS RELEASE Release 16.2      BUILD 16.2      UP20150629       01:19:49
dcb_energy
/BATCH
/COM,ANSYS RELEASE Release 16.2      BUILD 16.2      UP20150629       14:29:45
/input,menust,tmp,''
/GST,ON
/PLO,INFO,3
/GRO,CURL,ON
/CPLANE,1
WPSTYLE,,,,,,,,0
c
/COM,ANSYS RELEASE Release 16.2      BUILD 16.2      UP20150629       14:33:28
dcb_energy
! alsel,all
! alsel,all
allsel,all
c
/COM,ANSYS RELEASE Release 16.2      BUILD 16.2      UP20150629       14:43:37
c
/COM,ANSYS RELEASE Release 16.2      BUILD 16.2      UP20150629       14:43:41
dcb_energy
FINISH
! /EXIT,NOSAV
/BATCH
/COM,ANSYS RELEASE Release 16.2      BUILD 16.2      UP20150629       15:07:36
/input,menust,tmp,''
/GST,ON
/PLO,INFO,3
/GRO,CURL,ON
/CPLANE,1
WPSTYLE,,,,,,,,0
c
/COM,ANSYS RELEASE Release 16.2      BUILD 16.2      UP20150629       15:07:49
dcb_energy
c
/COM,ANSYS RELEASE Release 16.2      BUILD 16.2      UP20150629       16:40:06
dcb_energy
c
/COM,ANSYS RELEASE Release 16.2      BUILD 16.2      UP20150629       17:56:06
dcb_energy
allsel,all
FINISH
! /EXIT,NOSAV
/BATCH
/COM,ANSYS RELEASE Release 16.2      BUILD 16.2      UP20150629       23:56:27
/input,menust,tmp,''
/GST,ON
/PLO,INFO,3
/GRO,CURL,ON
/CPLANE,1
WPSTYLE,,,,,,,,0
c
/COM,ANSYS RELEASE Release 16.2      BUILD 16.2      UP20150629       23:56:36
dcb_energy
c
/COM,ANSYS RELEASE Release 16.2      BUILD 16.2      UP20150629       23:58:38
dcb_energy
c
/COM,ANSYS RELEASE Release 16.2      BUILD 16.2      UP20150629       00:09:18
dcb_energy
dcb_energy
/BATCH
/COM,ANSYS RELEASE Release 16.2      BUILD 16.2      UP20150629       00:29:55
/input,menust,tmp,''
/GST,ON
/PLO,INFO,3
/GRO,CURL,ON
/CPLANE,1
WPSTYLE,,,,,,,,0
c
/COM,ANSYS RELEASE Release 16.2      BUILD 16.2      UP20150629       00:30:25
dcb_energy
c
/COM,ANSYS RELEASE Release 16.2      BUILD 16.2      UP20150629       00:37:10
dcb_energy
FINISH
! /EXIT,NOSAV
/BATCH
/COM,ANSYS RELEASE Release 16.2      BUILD 16.2      UP20150629       04:01:11
/input,menust,tmp,''
/GST,ON
/PLO,INFO,3
/GRO,CURL,ON
/CPLANE,1
WPSTYLE,,,,,,,,0
c
/COM,ANSYS RELEASE Release 16.2      BUILD 16.2      UP20150629       04:01:22
dcb_energy
c
/COM,ANSYS RELEASE Release 16.2      BUILD 16.2      UP20150629       04:13:50
dcb_energy
dcb_energy
/BATCH
/COM,ANSYS RELEASE Release 16.2      BUILD 16.2      UP20150629       04:17:14
/input,menust,tmp,''
/GST,ON
/PLO,INFO,3
/GRO,CURL,ON
/CPLANE,1
WPSTYLE,,,,,,,,0
c
/COM,ANSYS RELEASE Release 16.2      BUILD 16.2      UP20150629       04:17:25
dcb_energy
c
/COM,ANSYS RELEASE Release 16.2      BUILD 16.2      UP20150629       04:25:03
dcb_energy
EPLOT
c
/COM,ANSYS RELEASE Release 16.2      BUILD 16.2      UP20150629       04:29:17
dcb_energy
c
/COM,ANSYS RELEASE Release 16.2      BUILD 16.2      UP20150629       04:31:02
dcb_energy
FINISH
! /EXIT,NOSAV
/BATCH
/COM,ANSYS RELEASE Release 16.2      BUILD 16.2      UP20150629       14:35:35
/input,menust,tmp,''
/GST,ON
/PLO,INFO,3
/GRO,CURL,ON
/CPLANE,1
WPSTYLE,,,,,,,,0
dcb_
/COM,ANSYS RELEASE Release 16.2      BUILD 16.2      UP20150629       14:36:22
*SET,aw,1
*SET,b,150
*SET,t,10
*SET,l,aw*0.05*b
*SET,E,3000
*SET,mu,0.3
*SET,H,0.4*b
model_dcb,b,t,l,E,mu,H
raschet
c
/COM,ANSYS RELEASE Release 16.2      BUILD 16.2      UP20150629       14:45:53
dcb_
c
/COM,ANSYS RELEASE Release 16.2      BUILD 16.2      UP20150629       14:46:40
dcb_
c
/COM,ANSYS RELEASE Release 16.2      BUILD 16.2      UP20150629       14:48:07
dcb_
c
/COM,ANSYS RELEASE Release 16.2      BUILD 16.2      UP20150629       14:48:52
dcb_
c
/COM,ANSYS RELEASE Release 16.2      BUILD 16.2      UP20150629       14:51:15
dcb_
c
/COM,ANSYS RELEASE Release 16.2      BUILD 16.2      UP20150629       14:52:11
*DIM,coeff,,209
*vread,coeff(1,1),'C:\Users\Steplerchik\Desktop\НИРс\Параметрический ДКБ образец ANSYS\Data-out\coeff',txt,,IJK,19,1,,1
! (F20.0)
c
/COM,ANSYS RELEASE Release 16.2      BUILD 16.2      UP20150629       14:52:37
dcb_
/COM,ANSYS RELEASE Release 16.2      BUILD 16.2      UP20150629       14:52:56
dcb_
/COM,ANSYS RELEASE Release 16.2      BUILD 16.2      UP20150629       14:55:57
c
/COM,ANSYS RELEASE Release 16.2      BUILD 16.2      UP20150629       14:55:59
dcb_
/COM,ANSYS RELEASE Release 16.2      BUILD 16.2      UP20150629       14:58:13
c
/COM,ANSYS RELEASE Release 16.2      BUILD 16.2      UP20150629       15:03:40
dcb_
/COM,ANSYS RELEASE Release 16.2      BUILD 16.2      UP20150629       15:06:17
c
/COM,ANSYS RELEASE Release 16.2      BUILD 16.2      UP20150629       15:06:19
dcb_
/COM,ANSYS RELEASE Release 16.2      BUILD 16.2      UP20150629       15:11:38
c
/COM,ANSYS RELEASE Release 16.2      BUILD 16.2      UP20150629       15:12:40
dcb_
/COM,ANSYS RELEASE Release 16.2      BUILD 16.2      UP20150629       15:13:25
dcb_
/COM,ANSYS RELEASE Release 16.2      BUILD 16.2      UP20150629       15:15:29
c
/COM,ANSYS RELEASE Release 16.2      BUILD 16.2      UP20150629       15:16:45
dcb_
/COM,ANSYS RELEASE Release 16.2      BUILD 16.2      UP20150629       15:17:16
c
/COM,ANSYS RELEASE Release 16.2      BUILD 16.2      UP20150629       15:17:40
dcb_
/COM,ANSYS RELEASE Release 16.2      BUILD 16.2      UP20150629       15:18:22
c
/COM,ANSYS RELEASE Release 16.2      BUILD 16.2      UP20150629       17:00:42
c
/COM,ANSYS RELEASE Release 16.2      BUILD 16.2      UP20150629       17:00:44
dcb_
/COM,ANSYS RELEASE Release 16.2      BUILD 16.2      UP20150629       17:20:50
*CFOPEN,'C:\Users\Steplerchik\Desktop\НИРс\Параметрический ДКБ образец ANSYS\Data-out\coeff_04',txt,,
/BATCH
/COM,ANSYS RELEASE Release 16.2      BUILD 16.2      UP20150629       17:23:52
/input,menust,tmp,''
/GST,ON
/PLO,INFO,3
/GRO,CURL,ON
/CPLANE,1
WPSTYLE,,,,,,,,0
c
/COM,ANSYS RELEASE Release 16.2      BUILD 16.2      UP20150629       17:24:02
dcb_
/COM,ANSYS RELEASE Release 16.2      BUILD 16.2      UP20150629       17:28:37
FINISH
! /EXIT,NOSAV
/BATCH
/COM,ANSYS RELEASE Release 16.2      BUILD 16.2      UP20150629       22:37:23
/input,menust,tmp,''
/GST,ON
/PLO,INFO,3
/GRO,CURL,ON
/CPLANE,1
WPSTYLE,,,,,,,,0
dcb
/COM,ANSYS RELEASE Release 16.2      BUILD 16.2      UP20150629       08:19:39
FINISH
! /EXIT,NOSAV
/BATCH
/COM,ANSYS RELEASE Release 16.2      BUILD 16.2      UP20150629       18:41:20
/input,menust,tmp,''
/GST,ON
/PLO,INFO,3
/GRO,CURL,ON
/CPLANE,1
WPSTYLE,,,,,,,,0
*SET,aw,10
*SET,b,150
*SET,t,10
*SET,l,aw*0.05*b
*SET,E,3000
*SET,mu,0.3
*SET,H,0.4*b
model_dcb,b,t,l,E,mu,H
EPLOT
/PLOPTS,INFO,3
/PLOPTS,LEG1,0
/PLOPTS,LEG2,1
/PLOPTS,LEG3,1
/PLOPTS,FRAME,1
/PLOPTS,TITLE,1
/PLOPTS,MINM,1
/PLOPTS,FILE,0
/PLOPTS,LOGO,1
/PLOPTS,WINS,1
/PLOPTS,WP,0
/PLOPTS,DATE,2
/PLOPTS,INFO,3
/PLOPTS,LEG1,1
/PLOPTS,LEG2,1
/PLOPTS,LEG3,1
/PLOPTS,FRAME,1
/PLOPTS,TITLE,1
/PLOPTS,MINM,1
/PLOPTS,FILE,0
/PLOPTS,LOGO,1
/PLOPTS,WINS,1
/PLOPTS,WP,0
/PLOPTS,DATE,2
/PLOPTS,INFO,0
/PLOPTS,LEG1,1
/PLOPTS,LEG2,1
/PLOPTS,LEG3,1
/PLOPTS,FRAME,1
/PLOPTS,TITLE,1
/PLOPTS,MINM,1
/PLOPTS,FILE,0
/PLOPTS,LOGO,1
/PLOPTS,WINS,1
/PLOPTS,WP,0
/PLOPTS,DATE,2
/PLOPTS,INFO,0
/PLOPTS,LEG1,1
/PLOPTS,LEG2,1
/PLOPTS,LEG3,1
/PLOPTS,FRAME,1
/PLOPTS,TITLE,1
/PLOPTS,MINM,1
/PLOPTS,FILE,0
/PLOPTS,LOGO,0
/PLOPTS,WINS,1
/PLOPTS,WP,0
/PLOPTS,DATE,2
NPLOT
NPLOT
EPLOT
NPLOT
c
/COM,ANSYS RELEASE Release 16.2      BUILD 16.2      UP20150629       19:42:45
*SET,aw,1
*SET,b,150
*SET,t,10
*SET,l,aw*0.05*b
*SET,E,3000
*SET,mu,0.3
*SET,H,0.4*b
model_dcb,b,t,l,E,mu,H
raschet
/PLOPTS,INFO,2
/PLOPTS,LEG1,1
/PLOPTS,LEG2,1
/PLOPTS,LEG3,1
/PLOPTS,FRAME,1
/PLOPTS,TITLE,1
/PLOPTS,MINM,1
/PLOPTS,FILE,0
/PLOPTS,LOGO,1
/PLOPTS,WINS,1
/PLOPTS,WP,0
/PLOPTS,DATE,2
/PLOPTS,INFO,3
/PLOPTS,LEG1,1
/PLOPTS,LEG2,1
/PLOPTS,LEG3,1
/PLOPTS,FRAME,1
/PLOPTS,TITLE,1
/PLOPTS,MINM,1
/PLOPTS,FILE,0
/PLOPTS,LOGO,1
/PLOPTS,WINS,1
/PLOPTS,WP,0
/PLOPTS,DATE,2
c
/COM,ANSYS RELEASE Release 16.2      BUILD 16.2      UP20150629       19:46:09
c
/COM,ANSYS RELEASE Release 16.2      BUILD 16.2      UP20150629       19:46:13
*SET,aw,1
*SET,b,150
*SET,t,10
*SET,l,aw*0.05*b
*SET,E,3000
*SET,mu,0.3
*SET,H,0.4*b
model_dcb,b,t,l,E,mu,H
raschet
FLST,2,2,1
FITEM,2,1179
FITEM,2,16586
PATH,stepchik,2,30,20,
PPATH,P51X,1
PATH,STAT
FINISH
! /EXIT,NOSAV
/BATCH
/COM,ANSYS RELEASE Release 16.2      BUILD 16.2      UP20150629       00:10:43
/input,menust,tmp,''
/GST,ON
/PLO,INFO,3
/GRO,CURL,ON
/CPLANE,1
WPSTYLE,,,,,,,,0
/PREP7
FINISH
! /EXIT,NOSAV
